Test Geometry
#Autogenerated AVL Geometry

0.0
0   0   0
11.5244   1.13627   10.142
0.31   0.0   0.0
0.0098379


SURFACE
Test Surface

10   1.0   40   -2.0

YDUPLICATE
0.0
SCALE
1.0   1.0   1.0


SECTION
0.0   0.0   0.0   1.13627   0.0
NACA
4412

SECTION
0.0   0.774   0.0   1.13627   0.0
NACA
4412

SECTION
0.0   3.0586   0.0   1.13627   0.0
NACA
4412

#END
